#Input scripts
# {{ title}}
units	      metal
boundary      p p p
atom_style    atomic

lattice		custom {{ latpar }} {{ lVs }}&
		{{ bVs }}
region		box block 0 1.0 0 1.0 0 1.0
create_box	2 box  # 2 because it's a binary, and use the region named "box"
create_atoms	2 box {{ basis }}

pair_style	eam/alloy
pair_coeff	* * {{ potential }} {{ species }}

neighbor	2.0 bin
neigh_modify	delay 10 check yes

# ---------- Define Settings ---------------------
compute eng all pe/atom
compute eatoms all reduce sum c_eng

# ---------- Run Minimization ---------------------
reset_timestep 0
fix 1 all box/relax iso 0.0 vmax 0.001
thermo 10
thermo_style custom step pe lx ly lz press pxx pyy pzz c_eatoms
min_style cg
minimize 1e-25 1e-25 5000 10000

variable natoms equal "count(all)"
variable teng equal "c_eatoms"
variable length equal "lx"
variable ecoh equal "v_teng/v_natoms"

print "Total energy (eV) = ${teng};"
print "Number of atoms = ${natoms};"
print "Lattice constant (Angstoms) = ${length};"
print "Cohesive energy (eV) = ${ecoh};"

print "All done!"
